// COMSOL Multiphysics 6.2.0.290 model "harness_conical_demo.mph"
// Outline of the model tree

Parameters
  r_in = 4.35
  r_out = 10
  z_feed = 20
  z_tip = 60
  r_tip_in = 0.5
  r_tip_out = 6
  freq = 2.45[GHz]
  P_in = 1[W]

Geometry
  geom1 "Axisymmetric air gap" (2D axisymmetric, length unit mm)
    gap: Polygon "Conical annular gap (air)"
      source = table
      table = {{r_in, 0}, {r_out, 0}, {r_out, z_feed}, {r_tip_out, z_tip}, {r_tip_in, z_tip}, {r_in, z_feed}}
    fin: Finalize "形成联合体"

Materials
  mat1: Common "Air (user-declared baseline)" on domains 1
    def "基本"
      relpermittivity = 1
      relpermeability = 1
      electricconductivity = 0

Physics
  emw: ElectromagneticWavesFrequencyDomain on all domains
    dependent variable E = {Er, Ephi, Ez}
    wee1: WaveEquationElectric "波动方程，电 1" (default)
    axi1: AxialSymmetry "轴对称 1" (default)
    pec1: PerfectElectricConductor "理想电导体 1" (default)
    init1: init "初始值 1" (default)
    port1: Port "Coaxial TEM input port" on boundaries 4 | PortName = 1; Pin = P_in; PortType = Coaxial
    sbc1: Scattering "Open scattering outlet" on boundaries 2

Mesh
  mesh1 "网格 1"
    size: MeshSizeDefault "大小" | hmax = 4.02; hmin = 0.018; hcurve = 0.3; hgrad = 1.3
    size1: Size "大小 1" on entire geometry | hauto = 4
    ftri1: FreeTri "自由三角形网格 1" on remaining entities

Studies
  std1 "Frequency-domain study"
    freq: Frequency "Frequency sweep" | punit = THz; plist = freq

Solver configurations
  sol1 "解 1" (study std1)
    v1: Variables "因变量 1"
    s1: Stationary "稳态求解器 1"
      p1: Parametric "参数化 1"
      fc1: FullyCoupled "全耦合 1"
      d1: Direct "建议的直接求解器 (emw)"

Datasets
  dset1: Solution | solution = sol1

Derived values
  s11_check: Global "插值" | data = dset1; expr = ewfd.S11